# OpenSim document version 40000
NeuralControlPersonalizationTool:
  input_directory: preprocessed
  mtp_results_input_directory: mtpResults
  input_model_file: model.osim
  coordinate_list: hip_flexion_r hip_adduction_r hip_rotation_r knee_angle_r ankle_angle_r subtalar_angle_r mtp_angle_r hip_flexion_l hip_adduction_l hip_rotation_l knee_angle_l ankle_angle_l subtalar_angle_l mtp_angle_l lumbar_bending lumbar_extension lumbar_rotation thoracic_extension thoracic_bending thoracic_rotation
  muscle_tendon_parameter_initialization: false
  enforce_bilateral_symmetry: false
  max_iterations: 2e3
  max_function_evaluations: 1e8
  trial_prefixes: trial_1
  MuscleTendonLengthInitialization: is_enabled=false max_normalized_muscle_fiber_length=1
      min_normalized_muscle_fiber_length=0.6 optimize_maximum_muscle_stress=true optimize_isometric_max_force=true
      maximum_muscle_stress=610e3
    MuscleTendonLengthInitializationCostFunctionTerms:
      IndividualMuscles:
        PassiveJointMoments: is_enabled=true max_allowable_error=2
        OptimalMuscleFiberLength: is_enabled=true max_allowable_error=0.3 error_center=1
        TendonSlackLength: is_enabled=true max_allowable_error=1 error_center=1
        MinimumNormalizedMuscleFiberLength: is_enabled=true max_allowable_error=0.3
        MaximumNormalizedMuscleFiberLength: is_enabled=true max_allowable_error=0.03
        MaximumMuscleStress: is_enabled=true max_allowable_error=0.1 error_center=1.2
        PassiveMuscleForces: is_enabled=true max_allowable_error=10
      GroupedMuscles:
        NormalizedMuscleFiberLength: is_enabled=true max_allowable_error=0.1
        MaximumNormalizedMuscleFiberLength: is_enabled=true max_allowable_error=0.1
  SynergySet:
    Synergy: muscle_group_name=right_side num_synergies=6
    Synergy: muscle_group_name=left_side num_synergies=6
  NeuralControlCostFunctionTerms:
    MomentTracking: is_enabled=true max_allowable_error=5
    ActivationTracking: is_enabled=true max_allowable_error=0.01
    ActivationMinimization: is_enabled=true max_allowable_error=0.05
    GroupedActivation: is_enabled=true max_allowable_error=0.05
    GroupedNormalizedMuscleFiberLength: is_enabled=true max_allowable_error=0.05
  GroupedMuscles: activations=(InternalObliquesR ExternalObliquesR ErectorSpinaeR MultifidusR QuadratusLumborumR AdductorsR BicepsFemorisR TibialisAnteriorR FlexorLongusR GastrocR ExternalRotatorsR GluteusMaximusR GluteusMediusR GluteusMinimusR HipFlexorsR SemiHamstringsR QuadricepsR PeroneusR InternalObliquesL ExternalObliquesL ErectorSpinaeL MultifidusL QuadratusLumborumL AdductorsL BicepsFemorisL TibialisAnteriorL FlexorLongusL GastrocL ExternalRotatorsL GluteusMaximusL GluteusMediusL GluteusMinimusL HipFlexorsL SemiHamstringsL QuadricepsL PeroneusL)
      normalized_muscle_fiber_lengths=(GluteusMaximusL GluteusMediusL GluteusMinimusL HipFlexorsL PeroneusL GastrocL TibialisAnteriorL TibialisPosteriorL HamstringsFiberLengthL QuadricepsFiberLengthL AdductorFiberLengthL GluteusMaximusR GluteusMediusR GluteusMinimusR HipFlexorsR PeroneusR GastrocR TibialisAnteriorR TibialisPosteriorR HamstringsFiberLengthR QuadricepsFiberLengthR AdductorFiberLengthR InternalObliquesFiberLengthR ExternalObliquesFiberLengthR ErectorSpinaeLowR ErectorSpinaeMidR LongThorUpperR LongThorMidR LongThorLowR MultifidusFiberLengthR QuadratusLumbarumLowR QuadratusLumbarumMidR RectusAbdominusR InternalObliquesFiberLengthL ExternalObliquesFiberLengthL ErectorSpinaeLowL ErectorSpinaeMidL LongThorUpperL LongThorMidL LongThorLowL MultifidusFiberLengthL QuadratusLumbarumLowL QuadratusLumbarumMidL RectusAbdominusL)
